Lunit = 1 m
Munit = 1 kg
Tunit = 1 s
g = 9.80665
rho = 1.225
# mass x y z Ixx Iyy Izz Ixy Ixz Iyz
2 0.085 0 0 0.18 0.15 0.3 -0 -0 -0 # aircraft only
0.1 0.235 0 -0.03 6e-05 0.0003 0.0003 -0 -0 -0 # stowed sensor
0.0078 0.165 0 -0.03 0 0 0 -0 -0 -0 # stored cable point approximation
