H1 A extracted lifting surfaces - temporary sensor trial
0.0
0 0 0
0.55 0.305573696 1.8
0.514013158 0.000000000 0.015657895
0.0
SURFACE
H1_Wing
12 1
YDUPLICATE
0
SECTION
0.423664331 0.000000000 0.113376386 0.305573696 2.000000 16 1
AFILE
h1_wing.dat
SECTION
0.423664331 0.531600000 0.113376386 0.305573696 2.000000 10 1
AFILE
h1_wing.dat
CONTROL
aileron 1 .75 0 1 0 -1
SECTION
0.423664331 0.879400000 0.113376386 0.305573696 2.000000 2 1
AFILE
h1_wing.dat
CONTROL
aileron 1 .75 0 1 0 -1
SECTION
0.423664331 0.900000000 0.113376386 0.305573696 2.000000 2 1
AFILE
h1_wing.dat
SURFACE
H1_Horizontal_tail
10 1
YDUPLICATE
0
SECTION
1.169999957 0.000000000 0.029999999 0.200000048 0.000000 2 1
AFILE
h1_tail.dat
SECTION
1.169999957 0.036500000 0.029999999 0.200000048 0.000000 12 1
AFILE
h1_tail.dat
CONTROL
elevator 1 .75 0 1 0 1
SECTION
1.169999957 0.314500000 0.029999999 0.200000048 0.000000 3 1
AFILE
h1_tail.dat
CONTROL
elevator 1 .75 0 1 0 1
SECTION
1.169999957 0.350000000 0.029999999 0.200000048 0.000000 2 1
AFILE
h1_tail.dat
SURFACE
H1_Vertical_fin
10 1
SECTION
1.152500000 0.000000000 0.030000000 0.270000000 0.000000 16 1
AFILE
h1_fin.dat
CONTROL
rudder 1 .75 0 0 1 1
SECTION
1.187500000 0.000000000 0.330000000 0.130000000 0.000000 2 1
AFILE
h1_fin.dat
CONTROL
rudder 1 .75 0 0 1 1
