Normal R3 conventional high-wing test aircraft
0.0
0 0 0
0.555000000 0.309486486 1.8
0.504924804 0.000000000 0.021885794
0.0
SURFACE
R3_Main_wing
18 1
YDUPLICATE
0
SECTION
0.400000000 0.000000000 0.105000000 0.335000000 2.000000 4 1
AFILE
h1_wing.dat
SECTION
0.400000000 0.100000000 0.105000000 0.335000000 2.000000 12 1
AFILE
h1_wing.dat
SECTION
0.423625000 0.520000000 0.134369261 0.303500000 1.475000 12 1
AFILE
h1_wing.dat
CONTROL
aileron 1 .75 0 1 0 -1
SECTION
0.442750000 0.860000000 0.158144377 0.278000000 1.050000 3 1
AFILE
h1_wing.dat
CONTROL
aileron 1 .75 0 1 0 -1
SECTION
0.445000000 0.900000000 0.160941450 0.275000000 1.000000 1 1
AFILE
h1_wing.dat
SURFACE
R3_Horizontal_tail
14 1
YDUPLICATE
0
SECTION
1.220000000 0.000000000 0.075000000 0.230000000 0.000000 4 1
AFILE
h1_tail.dat
SECTION
1.224285714 0.050000000 0.076428571 0.221428571 0.000000 16 1
AFILE
h1_tail.dat
CONTROL
elevator 1 .75 0 1 0 1
SECTION
1.247857143 0.325000000 0.084285714 0.174285714 0.000000 3 1
AFILE
h1_tail.dat
CONTROL
elevator 1 .75 0 1 0 1
SECTION
1.250000000 0.350000000 0.085000000 0.170000000 0.000000 1 1
AFILE
h1_tail.dat
SURFACE
R3_Vertical_fin
14 1
SECTION
1.230000000 0.000000000 0.080000000 0.280000000 0.000000 8 1
AFILE
h1_fin.dat
CONTROL
rudder 1 .75 0 0 1 1
SECTION
1.267931034 0.000000000 0.180000000 0.228275862 0.000000 8 1
AFILE
h1_fin.dat
CONTROL
rudder 1 .75 0 0 1 1
SECTION
1.305862069 0.000000000 0.280000000 0.176551724 0.000000 8 1
AFILE
h1_fin.dat
CONTROL
rudder 1 .75 0 0 1 1
SECTION
1.340000000 0.000000000 0.370000000 0.130000000 0.000000 8 1
AFILE
h1_fin.dat
CONTROL
rudder 1 .75 0 0 1 1
BODY
R3_equivalent_area_fuselage
40 1
BFILE
fuselage_equivalent.dat
