H1 R2 section-based lifting surfaces and equivalent-area body
0.0
0 0 0
0.55 0.305573696 1.8
0.514968989 0.000000014 0.015066840
0.0
SURFACE
H1_Wing
25 1
YDUPLICATE
0
SECTION
0.423664331 0.000000000 0.113376386 0.305573696 2.000000 11 1
AFILE
h1_wing.dat
SECTION
0.423664331 0.250000000 0.113376386 0.305573696 2.000000 11 1
AFILE
h1_wing.dat
SECTION
0.423664331 0.531600000 0.113376386 0.305573696 2.000000 17 1
AFILE
h1_wing.dat
CONTROL
aileron 1 .75 0 1 0 -1
SECTION
0.423664331 0.879400000 0.113376386 0.305573696 2.000000 4 1
AFILE
h1_wing.dat
CONTROL
aileron 1 .75 0 1 0 -1
SECTION
0.423664331 0.900000000 0.113376386 0.305573696 2.000000 1 1
AFILE
h1_wing.dat
SURFACE
H1_Horizontal_tail
20 1
YDUPLICATE
0
SECTION
1.169999957 0.000000000 0.029999999 0.200000048 0.000000 4 1
AFILE
h1_tail.dat
SECTION
1.169999957 0.036500000 0.029999999 0.200000048 0.000000 14 1
AFILE
h1_tail.dat
CONTROL
elevator 1 .75 0 1 0 1
SECTION
1.169999957 0.180000000 0.029999999 0.200000048 0.000000 14 1
AFILE
h1_tail.dat
CONTROL
elevator 1 .75 0 1 0 1
SECTION
1.169999957 0.314500000 0.029999999 0.200000048 0.000000 6 1
AFILE
h1_tail.dat
CONTROL
elevator 1 .75 0 1 0 1
SECTION
1.169999957 0.350000000 0.029999999 0.200000048 0.000000 1 1
AFILE
h1_tail.dat
SURFACE
H1_Vertical_fin
20 1
SECTION
1.152500000 0.000000000 0.030000000 0.270000000 0.000000 11 1
AFILE
h1_fin.dat
CONTROL
rudder 1 .75 0 0 1 1
SECTION
1.164166667 0.000000000 0.130000000 0.223333333 0.000000 11 1
AFILE
h1_fin.dat
CONTROL
rudder 1 .75 0 0 1 1
SECTION
1.175833333 0.000000000 0.230000000 0.176666667 0.000000 11 1
AFILE
h1_fin.dat
CONTROL
rudder 1 .75 0 0 1 1
SECTION
1.187500000 0.000000000 0.330000000 0.130000000 0.000000 11 1
AFILE
h1_fin.dat
CONTROL
rudder 1 .75 0 0 1 1
BODY
H1_equivalent_area_fuselage
56 1
BFILE
fuselage_equivalent.dat
