N2 DBF2027 assumed high-wing test aircraft
0.0
0 0 0
0.4512000000 0.2678782506 1.7
0.4158027522935779 0.0 0.013176605504587153
0.0
SURFACE
N2_MainWing
12 1
YDUPLICATE
0
SECTION
0.32 0.0 0.09 0.3 2.0 8 1
AFILE
n2_2412.dat
CONTROL
aileron 1 .75 0 1 0 -1
SECTION
0.32 0.12 0.09 0.3 2.0 8 1
AFILE
n2_2412.dat
CONTROL
aileron 1 .75 0 1 0 -1
SECTION
0.337 0.48 0.115 0.26 1.5 8 1
AFILE
n2_2412.dat
CONTROL
aileron 1 .75 0 1 0 -1
SECTION
0.355 0.85 0.145 0.22 1.0 8 1
AFILE
n2_2412.dat
CONTROL
aileron 1 .75 0 1 0 -1
SURFACE
N2_HorizontalTail
12 1
YDUPLICATE
0
SECTION
1.035 0.0 0.1 0.185 0.0 8 1
AFILE
n2_0010.dat
CONTROL
elevator 1 .70 0 1 0 1
SECTION
1.035 0.1 0.1 0.185 0.0 8 1
AFILE
n2_0010.dat
CONTROL
elevator 1 .70 0 1 0 1
SECTION
1.07 0.31 0.11 0.135 0.0 8 1
AFILE
n2_0010.dat
CONTROL
elevator 1 .70 0 1 0 1
SURFACE
N2_Fin
10 1
SECTION
1.01 0 0.09 0.24 0 8 1
AFILE
n2_0010.dat
CONTROL
rudder 1 .70 0 0 1 1
SECTION
1.05 0 0.2 0.18 0 8 1
AFILE
n2_0010.dat
CONTROL
rudder 1 .70 0 0 1 1
SECTION
1.13 0 0.34 0.1 0 8 1
AFILE
n2_0010.dat
CONTROL
rudder 1 .70 0 0 1 1
