N3 DBF2027 new cargo aircraft medium
0.0
0 0 0
0.555200000000 0.313657540826 1.8
0.4650371057513913 0.0 0.0428942486085343
0.0
SURFACE
N3_MainWing
12 1
YDUPLICATE
0
SECTION
0.335 0.0 0.13 0.35 1.5 6 1
AFILE
n3_2412.dat
SECTION
0.335 0.14 0.13 0.35 1.5 6 1
AFILE
n3_2412.dat
SECTION
0.351 0.5 0.149 0.32 0.8 6 1
AFILE
n3_2412.dat
CONTROL
aileron 1 0.75 0 1 0 -1
SECTION
0.393 0.9 0.175 0.22 -0.5 6 1
AFILE
n3_2412.dat
CONTROL
aileron 1 0.75 0 1 0 -1
SURFACE
N3_HorizontalTail
12 1
YDUPLICATE
0
SECTION
1.245 0.0 0.205 0.21 1.0 6 1
AFILE
n3_0012.dat
SECTION
1.245 0.08 0.205 0.21 1.0 6 1
AFILE
n3_0012.dat
CONTROL
elevator 1 0.7 0 1 0 1
SECTION
1.285 0.36 0.22 0.145 1.0 6 1
AFILE
n3_0012.dat
CONTROL
elevator 1 0.7 0 1 0 1
SURFACE
N3_VerticalTail
12 1
SECTION
1.165 0 0.115 0.3 0 6 1
AFILE
n3_0012.dat
CONTROL
rudder 1 .70 0 0 1 1
SECTION
1.212 0 0.255 0.23 0 6 1
AFILE
n3_0012.dat
CONTROL
rudder 1 .70 0 0 1 1
SECTION
1.302 0 0.43 0.135 0 6 1
AFILE
n3_0012.dat
CONTROL
rudder 1 .70 0 0 1 1
